/batch
/solu
antype,0                               ! static analysis
nlgeom,on                              ! Turn on Large Deformation Effects
_thickRatio=  1                        ! Ratio of thick parts in the model
eqsl,sparse,,,,,1
cntr,print,1                           ! print out contact info and also make no initial contact an error
cncheck,dmp		                       ! Enable program controlled contact splitting for distributed memory parallel run
dmpoption,emat,no                      ! Don't combine emat file for DANSYS
dmpoption,esav,no                      ! Don't combine esav file for DANSYS
nldiag,cont,iter                       ! print out contact info each equilibrium iteration
rescontrol,define,last,last,,dele	   ! Program Controlled

! Soluciona o caso de carga
esel,s,type,,4
nsle
sf,all,pres,0.15
nsel,all
esel,all
esel,all
/nopr
/gopr

! Liga o refino de carregamento
autots,on
deltim,0.1,0.0001,1,OFF
time,1.

! Grava tudo e mais um pouco...
outres,erase
outres,all,all
outres,nsol,all,
outres,rsol,all
outres,eangl,all
outres,etmp,all
outres,veng,all
outres,strs,all,
outres,epel,all,
outres,eppl,all,
outres,cont,all,

! Soluciona o modelo
solve

FINI
